// COMSOL Multiphysics 5.0.0.243 model "FWM_asymmetric_template_empty.mph"
// Outline of the model tree

Parameters
  w = 3000[nm]  // core width
  hg = 250[nm]  // core height
  ho = 3[um]  // bottom height
  wt = 10[um]  // object width
  hts = 2000[nm]  // top height
  c = c_const  // speed of light
  f = c/la  // main frequency
  lam = la*1e6  // main frequency x 1E6
  gap = 0[nm]  // ??
  la = 1.55[um]  // main wavelength
  lai = 1.45[um]  // sweep's initial wavelength
  laf = 1.65[um]  // sweep's final wavelength
  n_modi = 8  // number of modes
  n_w = 1  // number of widths
  n_h = 1  // number of heigths
  n_la = 21  // number of wavelengths
  n_T = 5  // number of temperatures
  Tin = 0[K]  // sweep's initial temperature
  Tfin = 400[K]  // sweep's final temperature
  Temp = 0[K]  // Temperature
  TOC = 1.87e-4[1/K]  // Thermo-Optic Coefficient
  pw = 3[um]  // metal plaque width
  HTC = 5  // Heat Transfer Coefficient (Convection)

Functions
  an1: Analytic "n_sin" | expr = sqrt(1+2.8939*lam^2/(lam^2-139.67e-3^2) ); args = lam
  an2: Analytic "n_si" | expr = sqrt(1+10.6684293*lam^2/(lam^2-0.301516485^2)+0.003043475*lam^2/(lam^2-1.13475115^2)+1.54133408*lam^2/(lam^2-1104.0^2)); args = lam
  an3: Analytic "n_sio2" | expr = sqrt(1+0.6961663*lam^2/(lam^2-0.0684043^2)+0.4079426*lam^2/(lam^2-0.1162414^2)+0.8974794*lam^2/(lam^2-9.896161^2)); args = lam

Variables
  var1 "Variables 1"
    ii1 = i1(emw.normE^2)/i2(emw.normE^2)
    n_sio2 = sqrt(1+0.6961663*lam^2/(lam^2-0.0684043^2)+0.4079426*lam^2/(lam^2-0.1162414^2)+0.8974794*lam^2/(lam^2-9.896161^2))
    n_si = sqrt(1+10.6684293*lam^2/(lam^2-0.301516485^2)+0.003043475*lam^2/(lam^2-1.13475115^2)+1.54133408*lam^2/(lam^2-1104.0^2))
    Aeff = i1(abs(emw.normE)^2)^2/i1(abs(emw.normE)^4)
    n_sin = sqrt(1+2.8939*lam^2/(lam^2-139.67e-3^2) )

Couplings
  intop1: Integration "i1" on domains 1-3 | opname = i1
  intop2: Integration "i2" on domains 3 | opname = i2

Geometry
  geom1 "Geometry 1" (2D, length unit µm)
    r1: Rectangle "guide" | pos = {-(gap)/2, 0}; size = {w, hg}
    r2: Rectangle "guide 2" (disabled)
      pos = {+(gap)/2+w/2, 0}
      type = solid
      base = center
      layerbottom = on
      size = {w, hg}
    r3: Rectangle "box" | pos = {0, -(ho/2+hg/2)}; size = {wt, ho}
    r4: Rectangle "top" | pos = {0, hts/2-hg/2}; type = solid; base = center; layerbottom = on; size = {wt, hts}
    r5: Rectangle (disabled) | pos = {0, hts+hm/2-hg/2}; type = solid; base = center; layerbottom = on; size = {wt, hm}
    rot1: Rotate | input = r1, r3, r4; rotconstr = on; posconstr = {on, on}
    r6: Rectangle (disabled)
      pos = {0, -(ho+hsub/2+hg/2)}
      type = solid
      base = center
      layerbottom = on
      size = {wt, hsub}
    r7: Rectangle "guide 1" (disabled)
      pos = {(gap+w)/2, 0}
      type = solid
      base = center
      layerbottom = on
      size = {w-mis, hg}
    b1: BezierPolygon "Bézier Polygon 1" (disabled) | p = {{-1.65, 1.55}, {0, 0}}; degree = 1; w = {1, 1}; type = solid
    r8: Rectangle "nitride" (disabled) | pos = {-(gap)/2, hg/2+hn/2}; size = {w, hn}
    r9: Rectangle (disabled) | pos = {w/2+hn/2, hn/2}; base = center; size = {hn, hn+hg}
    r10: Rectangle (disabled) | pos = {-w/2-hn/2, hn/2}; base = center; size = {hn, hn+hg}
    r11: Rectangle "nitride 1" (disabled) | pos = {-(gap)/2, -hg/2+hn/2}; size = {wt, hn}
    r12: Rectangle (disabled) | pos = {-w/2, hg/2-hspig}; rot = 54; size = {1, 1}
    mir1: Mirror (disabled) | input = r12; keep = on
    dif1: Difference (disabled) | input = rot1(1); input2 = mir1, r12
    pol1: Polygon "Boundaries"
      type = closed
      source = table
      table = 
        {-wt/2, -ho-hg/2}
        {+wt/2, -ho-hg/2}
        {+wt/2, +hts-hg/2}
        {pw/2+w*3/4, +hts-hg/2}
        {-pw/2+w*3/4, +hts-hg/2}
        {-wt/2, +hts-hg/2}
    fin: Finalize "Form Union"

Materials
  mat1: Common "Si" on domains 3
    def "Basic"
      thermalconductivity = 130[W/(m*K)]
      density = 2329[kg/m^3]
      heatcapacity = 700[J/(kg*K)]
    RefractiveIndex
      n = n_si+TOC*Temp
      ki = 0
  mat2: Common "SiO2" on domains 1, 2
    def "Basic"
      thermalconductivity = 1.38[W/(m*K)]
      density = 2203[kg/m^3]
      heatcapacity = 703[J/(kg*K)]
    RefractiveIndex
      n = n_sio2
      ki = 0
  mat3: Common "nitride" (disabled) on no domains
    RefractiveIndex
      n = n_sin
      ki = 0
  mat4: Common "Air" (disabled) on no domains
    def "Basic"
      relpermeability = 1
      relpermittivity = 1
      dynamicviscosity = eta(T[1/K])[Pa*s]
      ratioofspecificheat = 1.4
      electricconductivity = 0[S/m]
      heatcapacity = Cp(T[1/K])[J/(kg*K)]
      density = rho(pA[1/Pa],T[1/K])[kg/m^3]
      thermalconductivity = k(T[1/K])[W/(m*K)]
      soundspeed = cs(T[1/K])[m/s]
      eta: Piecewise | arg = T; extrap = constant; pieces = {200.0, 1600.0, -8.38278E-7+8.35717342E-8*T^1-7.69429583E-11*T^2+4.6437266E-14*T^3-1.06585607E-17*T^4}
      Cp: Piecewise | arg = T; extrap = constant; pieces = {200.0, 1600.0, 1047.63657-0.372589265*T^1+9.45304214E-4*T^2-6.02409443E-7*T^3+1.2858961E-10*T^4}
      rho: Analytic | expr = pA*0.02897/8.314/T; args = {pA, T}; dermethod = manual; argders = {{pA, d(pA*0.02897/8.314/T,pA)}, {T, d(pA*0.02897/8.314/T,T)}}
      k: Piecewise | arg = T; extrap = constant; pieces = {200.0, 1600.0, -0.00227583562+1.15480022E-4*T^1-7.90252856E-8*T^2+4.11702505E-11*T^3-7.43864331E-15*T^4}
      cs: Analytic | expr = sqrt(1.4*287*T); args = T; dermethod = manual; argders = {T, d(sqrt(1.4*287*T),T)}
    RefractiveIndex
      n = 1
      ki = 0

Physics
  emw: ElectromagneticWaves "Electromagnetic Waves, Frequency Domain" on all domains
    dependent variable E = {Ex, Ey, Ez}
    wee1: WaveEquationElectric (default) | DisplacementFieldModel = RefractiveIndex
    pec1: PerfectElectricConductor (default)
    init1: init "Initial Values 1" (default)
    sctr1: Scattering "Scattering Boundary Condition 1" on all boundaries
  ht: HeatTransfer "Heat Transfer in Solids" on all domains
    dependent variable T
    solid1: SolidHeatTransferModel "Heat Transfer in Solids 1" (default)
    init1: init "Initial Values 1" (default)
    ins1: ThermalInsulation (default)
    temp1: TemperatureBoundary "Ambient Temperature" on boundaries 1-3, 13, 14
    temp2: TemperatureBoundary "Hot Temperature" on boundaries 9 | T0 = 293.15[K]+Temp
    hf1: HeatFluxBoundary "Heat Flux 1" on boundaries 5, 12 | HeatFluxType = ConvectiveHeatFlux; h = HTC

Mesh
  mesh1 "Mesh 1"
    size: MeshSizeDefault | hmax = la/4/1.4/1.5; hgrad = 1.1; hauto = 5; custom = on
    size1: Size on domains 3 | hmax = la/20/3.4/1.1; hauto = 5; custom = on
    ftri1: FreeTri "Free Triangular 1" on remaining entities
      xscale = 1
      yscale = 1
      smoothcontrol = on
      smoothmaxiter = 8
      smoothmaxdepth = 8

Studies
  std1 "Study 1"
    param: Parametric "Parametric Sweep"
      sweeptype = filled
      pname = {la, Temp}
      plistarr = {range(lai,(laf-(lai))/(n_la-1),laf), range(Tin,(Tfin-(Tin))/(n_T-1),Tfin)}
      punit = {, }
    stat: Stationary "Heat Transfer Stationary Solution" | physselection = emw; solve for = {ht}
    mode: ModeAnalysis
      neigs = 8
      shift = 4
      modeFreq = c_const/la
      physselection = emw
      solve for = {emw}
      eigmethod = manual